// SBML level 3 version 1

model transporter_full()
  // model units - substance: substance, time: time_unit, volume: volume, area: area, length: length, extent: extent

  // Compartments:
  compartment v_m = total_membrane_volume; v_m has volume;
  compartment v_out = total_external_volume; v_out has volume;
  compartment v_in = total_internal_volume; v_in has volume;

  // Species:
  species OF in v_m = molar_concentration_transporters;  // substance in mole
  species OF_Hb in v_m = 0;  // substance in mole
  species IF_Hb in v_m = 0;  // substance in mole
  species IF_Hb_Sb in v_m = 0;  // substance in mole
  species IF_Sb in v_m = 0;  // substance in mole
  species OF_Sb in v_m = 0;  // substance in mole
  species OF_Hb_Hb in v_m = 0;  // substance in mole
  species IF_Hb_Hb in v_m = 0;  // substance in mole
  species H_in in v_in = 5.24e-15/v_in;  // substance in mole
  species S_in in v_in = 5.24e-11/v_in;  // substance in mole
  species $H_out in v_out = 1e-7;  // substance in mole
  species $S_out in v_out = 0.001;  // substance in mole

  // Parameters:
  elem_charge = 1.602e-19;
  N_av = 6.022e23;
  n_liposomes = 100000000000;
  n_transporters = 10000000000000;
  liposome_volume = 5.24e-19;
  liposome_membrane_volume = 1.42e-19;
  liposome_external_volume = 2*liposome_volume;
  total_internal_volume = liposome_volume*n_liposomes;
  total_external_volume = 2*total_internal_volume;
  total_membrane_volume = liposome_membrane_volume*n_liposomes;
  k1_f = 10000000000;
  k1_r = 1000;
  k2_f = 10000000000;
  k2_r = 1000;
  k3_f = 100;
  k3_r = 100;
  k4_f = 1000;
  k4_r = 10000000000;
  k5_f = 10000000;
  k5_r = 1000;
  k6_f = 1000;
  k6_r = 10000000000;
  k7_f = 100;
  k7_r = 100;
  k8_f = 1000;

  // Assignment rules:
  k8_r := k1_f*k2_f*k3_f*k4_f*k5_f*k6_f*k7_f*k8_f/(k1_r*k2_r*k3_r*k4_r*k5_r*k6_r*k7_r);
  moles_transporters := n_transporters/N_av;
  molar_concentration_transporters := moles_transporters/total_membrane_volume;
  current := (rxn4 + rxn6)*N_av*elem_charge;
  transporter_amount := (OF + OF_Hb + OF_Sb + IF_Hb + IF_Sb + IF_Hb_Sb + OF_Hb_Hb + IF_Hb_Hb)*v_m;
  H_conc_ratio := H_out/H_in;
  S_conc_ratio := S_out/S_in;

  // Reactions:
  rxn1: OF + $H_out -> OF_Hb; v_out*(k1_f*OF*H_out - k1_r*OF_Hb);
  rxn2: OF_Hb + $H_out -> OF_Hb_Hb; v_out*(k2_f*OF_Hb*H_out - k2_r*OF_Hb_Hb);
  rxn3: OF_Hb_Hb -> IF_Hb_Hb; v_m*(k3_f*OF_Hb_Hb - k3_r*IF_Hb_Hb);
  rxn4: IF_Hb_Hb -> IF_Hb + H_in; v_in*(k4_f*IF_Hb_Hb - k4_r*IF_Hb*H_in);
  rxn5: IF_Hb + S_in -> IF_Hb_Sb; v_in*(k5_f*IF_Hb*S_in - k5_r*IF_Hb_Sb);
  rxn6: IF_Hb_Sb -> IF_Sb + H_in; v_in*(k6_f*IF_Hb_Sb - k6_r*IF_Sb*H_in);
  rxn7: IF_Sb -> OF_Sb; v_m*(k7_f*IF_Sb - k7_r*OF_Sb);
  rxn8: OF_Sb -> OF + $S_out; v_out*(k8_f*OF_Sb - k8_r*OF*S_out);

  // Unit definitions:
  unit volume = litre;
  unit substance_per_volume = mole / litre;
  unit length = metre;
  unit area = metre^2;
  unit time_unit = second;
  unit substance = mole;
  unit extent = mole;
end
