// SBML level 3 version 1

model antiporter_1_1_cycle2()
  // model units - substance: substance, time: time_unit, volume: volume, area: area, length: length, extent: extent

  // Compartments:
  compartment default_compartment = 1;

  // Species:
  species $conc_H_out in default_compartment = conc_H_out_0;
  species conc_S_out in default_compartment = conc_S_out_0;
  species conc_H_in in default_compartment = conc_H_in_0;
  species conc_S_in in default_compartment = conc_S_in_0;
  species conc_OF_Hb_Sb in default_compartment = conc_transporters_lipo_0;
  species conc_OF_Hb in default_compartment = 1.06486e-5/default_compartment;
  species conc_IF_Hb in default_compartment = 1.064861e-5/default_compartment;
  species conc_IF_Hb_Sb in default_compartment = 9.6239e-5/default_compartment;
  species conc_IF_Sb in default_compartment = 0.000106486/default_compartment;
  species conc_OF_Sb in default_compartment = 0.000106486/default_compartment;
  species $S_out in default_compartment = 0;

  // Parameters:
  elem_charge = 1.602e-19;
  N_av = 6.022e23;
  n_liposomes = 100000000000;
  avg_liposome_diameter = 1e-7;
  n_transporters = 10000000000000/2;
  v_out_tot = 7e-5;
  v_m_tot = 1.9e-8;
  v_in_tot = 7e-8;
  conc_H_out_0 = 1e-7;
  conc_S_out_0 = 0.001;
  conc_H_in_0 = 1e-7;
  conc_S_in_0 = 0.001;
  k1_f_0 = 1000;
  k1_r_0 = 10000000;
  k2_f_0 = 100;
  k2_r_0 = 100;
  k3_f_0 = 10000000;
  k3_r_0 = 1000;
  k4_f_0 = 1000;
  k4_r_0 = 10000000000;
  k5_f_0 = 100;
  k5_r_0 = 100;
  k6_f_0 = 10000000000;

  // Assignment rules:
  n_transporters_per_liposome := n_transporters/n_liposomes;
  v_out_lipo := v_out_tot/n_liposomes;
  v_m_lipo := v_m_tot/n_liposomes;
  v_in_lipo := v_in_tot/n_liposomes;
  mol_transporters_tot_0 := n_transporters/N_av;
  mol_transporters_lipo_0 := n_transporters_per_liposome/N_av;
  conc_transporters_tot_0 := mol_transporters_tot_0/v_m_tot;
  conc_transporters_lipo_0 := mol_transporters_lipo_0/v_m_lipo;
  k1_f := k1_f_0*exp(0);
  k1_r := k1_r_0*exp(0);
  k2_f := k2_f_0*exp(0);
  k2_r := k2_r_0*exp(0);
  k3_f := k3_f_0*exp(0);
  k3_r := k3_r_0*exp(0);
  k4_f := k4_f_0*exp(0);
  k4_r := k4_r_0*exp(0);
  k5_f := k5_f_0*exp(0);
  k5_r := k5_r_0*exp(0);
  k6_f := k6_f_0*exp(0);
  k6_r := k1_f*k2_f*k3_f*k4_f*k5_f*k6_f/(k1_r*k2_r*k3_r*k4_r*k5_r);
  k6_r_0 := k1_f_0*k2_f_0*k3_f_0*k4_f_0*k5_f_0*k6_f_0/(k1_r_0*k2_r_0*k3_r_0*k4_r_0*k5_r_0);
  net_ion_influx := rxn4;
  transporter_amount := (conc_OF_Hb_Sb + conc_OF_Hb + conc_OF_Sb + conc_IF_Hb + conc_IF_Sb + conc_IF_Hb_Sb)*v_m_lipo;
  H_conc_ratio := conc_H_out/conc_H_in;
  S_conc_ratio := conc_S_out/conc_S_in;

  // Reactions:
  rxn1: conc_OF_Hb_Sb -> conc_OF_Hb + $S_out; k1_f*conc_OF_Hb_Sb - k1_r*conc_OF_Hb*conc_S_out;  // modifiers: conc_S_out
  rxn2: conc_OF_Hb -> conc_IF_Hb; k2_f*conc_OF_Hb - k2_r*conc_IF_Hb;
  rxn3: conc_IF_Hb + conc_S_in -> conc_IF_Hb_Sb; k3_f*conc_IF_Hb*conc_S_in - k3_r*conc_IF_Hb_Sb;
  rxn4: conc_IF_Hb_Sb -> conc_IF_Sb + conc_H_in; k4_f*conc_IF_Hb_Sb - k4_r*conc_IF_Sb*conc_H_in;
  rxn5: conc_IF_Sb -> conc_OF_Sb; k5_f*conc_IF_Sb - k5_r*conc_OF_Sb;
  rxn6: conc_OF_Sb + $conc_H_out -> conc_OF_Hb_Sb; k6_f*conc_OF_Sb*conc_H_out - k6_r*conc_OF_Hb_Sb;

  // Unit definitions:
  unit substance_per_volume = mole / litre;
  unit volume = litre;
  unit length = metre;
  unit area = metre^2;
  unit time_unit = second;
  unit substance = mole;
  unit extent = mole;
end
