// SBML level 3 version 1

model antiporter_1_1_cycle1()
  // model units - substance: substance, time: time_unit, volume: volume, area: area, length: length, extent: extent

  // Compartments:
  compartment default_compartment = 1;

  // Species:
  species $conc_H_out in default_compartment = conc_H_out_0;
  species $conc_S_out in default_compartment = conc_S_out_0;
  species conc_H_in in default_compartment = conc_H_in_0;
  species conc_S_in in default_compartment = conc_S_in_0;
  species conc_OF in default_compartment = conc_transporters_lipo_0;
  species conc_OF_Hb in default_compartment = 0;
  species conc_IF_Hb in default_compartment = 0;
  species conc_IF_Hb_Sb in default_compartment = 0;
  species conc_IF_Sb in default_compartment = 0;
  species conc_OF_Sb in default_compartment = 0;

  // Parameters:
  elem_charge = 1.602e-19;
  N_av = 6.022e23;
  F = 96485;
  R = 8.314;
  T = 298.15;
  N_charge = 1;
  F_over_RT = F/(R*T);
  conc_H_out_0_scale = 1;
  conc_S_out_0_scale = 1;
  conc_transporters_scale = 1;
  I_t_scale = 1;
  n_liposomes = 100000000000;
  avg_liposome_diameter = 1e-7;
  n_transporters = 10000000000000/2;
  liposome_surface_area = 4*3.14159*(avg_liposome_diameter/2)*(avg_liposome_diameter/2);
  liposome_capacitance = 0.0075;
  C_m_scale = 1;
  v_out_tot = 7e-5;
  v_m_tot = 1.9e-8;
  v_in_tot = 7e-8;
  conc_H_out_0 = 1e-7;
  conc_S_out_0 = 0.001;
  conc_H_in_0 = 1e-7;
  conc_S_in_0 = 0.001;
  phi_1 = N_charge/6;
  phi_2 = N_charge/6;
  phi_3 = N_charge/6;
  phi_4 = N_charge/6;
  phi_5 = N_charge/6;
  phi_6 = N_charge/6;
  eps_1_f = phi_1/2;
  eps_1_r = -phi_1/2;
  eps_2_f = phi_2/2;
  eps_2_r = -phi_2/2;
  eps_3_f = phi_3/2;
  eps_3_r = -phi_3/2;
  eps_4_f = phi_4/2;
  eps_4_r = -phi_4/2;
  eps_5_f = phi_5/2;
  eps_5_r = -phi_5/2;
  eps_6_f = phi_6/2;
  eps_6_r = -phi_6/2;
  k1_f_0 = 10000000000;
  k1_r_0 = 1000;
  k2_f_0 = 100;
  k2_r_0 = 100;
  k3_f_0 = 10000000;
  k3_r_0 = 1000;
  k4_f_0 = 1000;
  k4_r_0 = 10000000000;
  k5_f_0 = 100;
  k5_r_0 = 100;
  k6_f_0 = 1000;
  I_t_per_liposome_sum = 0;

  // Assignment rules:
  n_transporters_per_liposome := n_transporters/n_liposomes;
  C_m := liposome_capacitance*liposome_surface_area*C_m_scale;
  v_out_lipo := v_out_tot/n_liposomes;
  v_m_lipo := v_m_tot/n_liposomes;
  v_in_lipo := v_in_tot/n_liposomes;
  mol_transporters_tot_0 := n_transporters/N_av;
  mol_transporters_lipo_0 := n_transporters_per_liposome/N_av;
  conc_transporters_tot_0 := mol_transporters_tot_0/v_m_tot;
  conc_transporters_lipo_0 := mol_transporters_lipo_0/v_m_lipo;
  k1_f := k1_f_0*k1_f_v;
  k1_r := k1_r_0*k1_r_v;
  k2_f := k2_f_0*k2_f_v;
  k2_r := k2_r_0*k2_r_v;
  k3_f := k3_f_0*k3_f_v;
  k3_r := k3_r_0*k3_r_v;
  k4_f := k4_f_0*k4_f_v;
  k4_r := k4_r_0*k4_r_v;
  k5_f := k5_f_0*k5_f_v;
  k5_r := k5_r_0*k5_r_v;
  k6_f := k6_f_0*k6_f_v;
  k6_r := exp(-(phi_1 + phi_2 + phi_3 + phi_4 + phi_5 + phi_6/2)*F*V/(R*T))*k6_r_0_constraint;
  k1_f_v := exp(-eps_1_f*F*V/(R*T));
  V := Q_t/C_m;
  k1_r_v := exp(-eps_1_r*F*V/(R*T));
  k2_f_v := exp(-eps_2_f*F*V/(R*T));
  k2_r_v := exp(-eps_2_r*F*V/(R*T));
  k3_f_v := exp(-eps_3_f*F*V/(R*T));
  k3_r_v := exp(-eps_3_r*F*V/(R*T));
  k4_f_v := exp(-eps_4_f*F*V/(R*T));
  k4_r_v := exp(-eps_4_r*F*V/(R*T));
  k5_f_v := exp(-eps_5_f*F*V/(R*T));
  k5_r_v := exp(-eps_5_r*F*V/(R*T));
  k6_f_v := exp(-eps_6_f*F*V/(R*T));
  k6_r_0_constraint := k1_f_0*k2_f_0*k3_f_0*k4_f_0*k5_f_0*k6_f_0/(k1_r_0*k2_r_0*k3_r_0*k4_r_0*k5_r_0);
  net_ion_influx := rxn4;
  transporter_amount := (conc_OF + conc_OF_Hb + conc_OF_Sb + conc_IF_Hb + conc_IF_Sb + conc_IF_Hb_Sb)*v_m_lipo;
  H_conc_ratio := conc_H_out/conc_H_in;
  S_conc_ratio := conc_S_out/conc_S_in;
  I_t_per_liposome := net_ion_influx*v_in_lipo*N_av*elem_charge;
  Q_t := I_t_per_liposome_sum;
  I_t_total := I_t_per_liposome*n_liposomes;
  Q_t_total := Q_t*n_liposomes;
  V_total := Q_t_total/C_m;

  // Rate rules:
  I_t_per_liposome_sum' = I_t_per_liposome;

  // Reactions:
  rxn1: conc_OF + $conc_H_out -> conc_OF_Hb; k1_f*conc_OF*conc_H_out - k1_r*conc_OF_Hb;
  rxn2: conc_OF_Hb -> conc_IF_Hb; k2_f*conc_OF_Hb - k2_r*conc_IF_Hb;
  rxn3: conc_IF_Hb + conc_S_in -> conc_IF_Hb_Sb; k3_f*conc_IF_Hb*conc_S_in - k3_r*conc_IF_Hb_Sb;
  rxn4: conc_IF_Hb_Sb -> conc_IF_Sb + conc_H_in; k4_f*conc_IF_Hb_Sb - k4_r*conc_IF_Sb*conc_H_in;
  rxn5: conc_IF_Sb -> conc_OF_Sb; k5_f*conc_IF_Sb - k5_r*conc_OF_Sb;
  rxn6: conc_OF_Sb -> conc_OF + $conc_S_out; k6_f*conc_OF_Sb - k6_r*conc_OF*conc_S_out;

  // Unit definitions:
  unit substance_per_volume = mole / litre;
  unit volume = litre;
  unit length = metre;
  unit area = metre^2;
  unit time_unit = second;
  unit substance = mole;
  unit extent = mole;
end
