// SBML level 3 version 1

model transporter_full()
  // model units - substance: substance, time: time_unit, volume: volume, area: area, length: length, extent: extent

  // Compartments:
  compartment vol = 0.0001 volume;

  // Species:
  species OF in vol = 4.721845e-13/vol;  // substance in mole
  species OF_Hb in vol = 4.721845e-13/vol;  // substance in mole
  species IF_Hb in vol = 4.721845e-13/vol;  // substance in mole
  species IF_Hb_Sb in vol = 4.721756e-12/vol;  // substance in mole
  species IF_Sb in vol = 4.721845e-12/vol;  // substance in mole
  species OF_Sb in vol = 4.721845e-12/vol;  // substance in mole
  species H_in in vol = 9.999811e-12/vol;  // substance in mole
  species S_in in vol = 9.999811e-8/vol;  // substance in mole
  species $H_out in vol = 5e-8;  // substance in mole
  species $S_out in vol = 0.001;  // substance in mole

  // Parameters:
  k1_f = 10000000000;
  k1_r = 1000;
  k2_f = 100;
  k2_r = 100;
  k3_f = 10000000;
  k3_r = 1000;
  k4_f = 1000;
  k4_r = 10000000000;
  k5_f = 100;
  k5_r = 100;
  k6_f = 1000;
  k6_r = 10000000;

  // Reactions:
  rxn1: OF + $H_out -> OF_Hb; vol*(k1_f*OF*H_out - k1_r*OF_Hb);
  rxn2: OF_Hb -> IF_Hb; vol*(k2_f*OF_Hb - k2_r*IF_Hb);
  rxn3: IF_Hb + S_in -> IF_Hb_Sb; vol*(k3_f*IF_Hb*S_in - k3_r*IF_Hb_Sb);
  rxn4: IF_Hb_Sb -> IF_Sb + H_in; vol*(k4_f*IF_Hb_Sb - k4_r*IF_Sb*H_in);
  rxn5: IF_Sb -> OF_Sb; vol*(k5_f*IF_Sb - k5_r*OF_Sb);
  rxn6: OF_Sb -> OF + $S_out; vol*(k6_f*OF_Sb - k6_r*OF*S_out);

  // Events:
  E1: at (time >= 2.5): S_out = 0.001, H_out = 1e-7;

  // Unit definitions:
  unit substance_per_volume = mole / litre;
  unit volume = litre;
  unit length = metre;
  unit area = metre^2;
  unit time_unit = second;
  unit substance = mole;
  unit extent = mole;
end
